<?xml version="1.0" encoding="UTF-8"?>
<neuroml xmlns="http://www.neuroml.org/schema/neuroml2"
	xmlns:xsi="http://www.w3.org/2001/XMLSchema-instance"
	xsi:schemaLocation="http://www.neuroml.org/schema/neuroml2 https://raw.github.com/NeuroML/NeuroML2/master/Schemas/NeuroML2/NeuroML_v2beta4.xsd"
	id="cell_HN1L">

	<include href="passive.channel.nml"/>
	<include href="na.channel.nml"/>
	<include href="k1.channel.nml"/>
	<include href="k2.channel.nml"/>

	  <!--ionChannelHH id="leak_channel_HN1L" conductance="10pS"></ionChannelHH-->

	  	<cell id="cell_HN1L">

        <morphology id="morph_HN1L">
            <segment id="0" name="soma">
                <proximal x="0" y="0" z="0" diameter="126.15663"/> <!--Gives a convenient surface area of 1000.0 um^2-->
                <distal x="126.15663" y="0" z="0" diameter="126.15663"/>
            </segment>

            <segmentGroup id="soma_group">
                <member segment="0"/>
            </segmentGroup>

        </morphology>

        <biophysicalProperties id="bio_phys">

            <membraneProperties>

            <!--channelPopulation id="leak_pop_HN1L" ionChannel="leak_channel_HN1L" erev="-55mV" number="1"/>
        	<channelPopulation id="na_pop_HN1L" ionChannel="na_channel" erev="45mV" number="1" />
        	<channelPopulation id ="k1_pop_HN1L" ionChannel="k1_channel" erev="70mV" number="1"/>
        	<channelPopulation id ="k2_pop_HN1L" ionChannel="k2_channel" erev="70mV" number="1"/-->

                <!--
                    The following values were taken from the cell_1L.p file and converted to the appropriate units
                RM = membrane resistance and was converted to the conductance density for leak channel(g = 1/RM)
                RA = resistivity(1 ohm*m = 0.1 kohm*cm)
                CM = specific capacitance(1 F/m^2)
                EREST_ACT = init membrane potential
                ELEAK = erev for leak channel
                Channel Density values are found by dividing the dens value in the .p file by the surface area, which is 50,000 um2(5e-8 m2)

				-->

            <channelDensity id="leak" ionChannel="passive" condDensity="0.2 S_per_m2" erev="-40.0mV" ion="non_specific"/>
            <channelDensity id="k1_chan_den" ionChannel="k1_channel" condDensity="3 S_per_m2" erev="-70mV" ion="k"/>
            <channelDensity id="k2_chan_den" ionChannel="k2_channel" condDensity="1.5 S_per_m2" erev="-70mV" ion="k"/>
            <channelDensity id="na_chan_den" ionChannel="na_channel" condDensity="5.1 S_per_m2" erev="45.0mV" ion="na"/>

            <spikeThresh value="-20mV"/>
            <specificCapacitance value="0.01 F_per_m2"/>
            <initMembPotential value="-63mV"/>

            </membraneProperties>

            <intracellularProperties>
                <resistivity value="0.03 kohm_cm"/> <!-- Not sure if this is necessary? -->
            </intracellularProperties>

        </biophysicalProperties>

	</cell>

</neuroml>
