<Lems>
	<!-- Custom componenet for the sigmoidal offset
			A + B / 1 + exp(Vm - Vh/scale) -->

	<ComponentType name="sigmoidOffsetTimeCourse"
        extends="baseVoltageDepTime"
        description="Voltage-dependent time constant that has a sigmoid shape and an offset">

        <Parameter name="offset" dimension="time" />
        <Parameter name="rate" dimension="time" />
        <Parameter name="midpoint" dimension="voltage" />
        <Parameter name="scale" dimension="voltage" />

        <Dynamics>
            <DerivedVariable name="t" exposure="t" value="offset + rate / (1 + exp(0 - (v - midpoint)/scale))" />
        </Dynamics>

    </ComponentType>
</Lems>
